*Heading
T026 independent PT verification; SI units; E=195GPa A=0.00014m2 L=112m
*Node,nset=ALLN
1,0,0,0
2,112,0,0
*Element,type=T3D2,elset=BODY
1,1,2
*Solid Section,elset=BODY,material=PT
0.00014,
*Material,name=PT
*Elastic
1.95e11,0.3
*Density
7850,
*Initial Conditions,type=STRESS
BODY,1.28e9
*Boundary
1,1,3
2,1,3
*Step,name=InitialEquilibrium,nlgeom=YES
*Static
0.1,1
*Output,field,frequency=1
*Node Output,nset=ALLN
U,RF
*Element Output,elset=BODY
S,E
*Output,history,frequency=1
*Energy Output
ALLIE,ALLSE
*End Step
*Step,name=TransversePerturbation,nlgeom=YES
*Static
0.1,1
*Boundary
2,2,2,-0.0005
*Output,field,frequency=1
*Node Output,nset=ALLN
U,RF
*Element Output,elset=BODY
S,E
*Output,history,frequency=1
*Energy Output
ALLIE,ALLSE
*End Step
