*HEADING
T038-S1 independent frozen R2 RNA inertia representation verification
** Numerical fixture only: no tower, no flexible/rotating RNA validation
*PREPRINT,ECHO=YES,MODEL=YES,HISTORY=YES
*NODE,NSET=REF
1, 0, 158, 0
*NODE,NSET=CG
2, -4.7940537423996612e-16, 160.78358803030605, -0.87296249889153976
*ELEMENT,TYPE=MASS,ELSET=RNA_MASS
1,2
*MASS,ELSET=RNA_MASS
676753.29072314012
*ELEMENT,TYPE=ROTARYI,ELSET=RNA_ROTARY
2,2
*ROTARY INERTIA,ELSET=RNA_ROTARY
94926999.798111737, 99481015.620164692, 155901495.33851188, 2.2844544447195585e-08, -4.2038404833725618e-10, -5231495.6902819779
*SURFACE,TYPE=NODE,NAME=CG_SURFACE
CG,1.
*COUPLING,CONSTRAINT NAME=RNA_OFFSET,REF NODE=1,SURFACE=CG_SURFACE
*KINEMATIC
1,6
*BOUNDARY
REF,1,6,0.
*STEP,NAME=GRAVITY,NLGEOM=NO
*STATIC
1.,1.
*DLOAD
RNA_MASS,GRAV,9.81,0.,-1.,0.
*OUTPUT,FIELD,FREQUENCY=1
*NODE OUTPUT,NSET=REF
U,UR,RF,RM
*OUTPUT,HISTORY,FREQUENCY=1
*NODE OUTPUT,NSET=REF
RF1,RF2,RF3,RM1,RM2,RM3
*NODE PRINT,NSET=REF,FREQUENCY=1
RF
*END STEP
