*HEADING
T038-S1 independent frozen R2 RNA inertia representation verification
** Numerical fixture only: no tower, no flexible/rotating RNA validation
*PREPRINT,ECHO=YES,MODEL=YES,HISTORY=YES
*NODE,NSET=REF
1, 0, 158, 0
*NODE,NSET=CG
2, -4.7940537423996612e-16, 160.78358803030605, -0.87296249889153976
*ELEMENT,TYPE=MASS,ELSET=RNA_MASS
1,2
*MASS,ELSET=RNA_MASS
676753.29072314012
*ELEMENT,TYPE=ROTARYI,ELSET=RNA_ROTARY
2,2
*ROTARY INERTIA,ELSET=RNA_ROTARY
94926999.798111737, 99481015.620164692, 155901495.33851188, 2.2844544447195585e-08, -4.2038404833725618e-10, -5231495.6902819779
*SURFACE,TYPE=NODE,NAME=CG_SURFACE
CG,1.
*COUPLING,CONSTRAINT NAME=RNA_OFFSET,REF NODE=1,SURFACE=CG_SURFACE
*KINEMATIC
1,6
*AMPLITUDE,NAME=MOTION,DEFINITION=SMOOTH STEP
0.,0.,0.1,1.
*BOUNDARY
REF,1,6,0.
*STEP,NAME=MOTION,NLGEOM=NO,INC=8000
*DYNAMIC,DIRECT,ALPHA=0.
2.5000000000000001e-05,0.1
*BOUNDARY,OP=NEW,AMPLITUDE=MOTION
REF,1,1,0.003
REF,2,2,-0.002
REF,3,3,0.001
REF,4,4,0.0001
REF,5,5,-0.0002
REF,6,6,0.00015
*OUTPUT,FIELD,FREQUENCY=40
*NODE OUTPUT,NSET=REF
U,UR,V,VR,A,AR,RF,RM
*NODE OUTPUT,NSET=CG
U,UR,V,VR,A,AR
*OUTPUT,HISTORY,FREQUENCY=40
*NODE OUTPUT,NSET=REF
V1,V2,V3,VR1,VR2,VR3
*NODE OUTPUT,NSET=CG
V1,V2,V3,VR1,VR2,VR3
*ENERGY OUTPUT
ALLKE,ALLWK,ETOTAL
*END STEP
